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# Til dette design skal følgende parametre bestemmes: VOUT, VIN min, VIN max, Iout max, fsw, fbw
# Output voltage:
Vfb := 1.235 V
VOUT := 5 V
R2 == R1/(Vout/Vfb - 1) solve, Vout → 1.235*V*(R1/R2 + 1.0)
R2 + R1 ≤ 150*kΩ
R1 := 82 kΩ
R2 := 27 kΩ
VOUT := 1.235*V*(R1/R2 + 1.0) = 4.98574 V
# Inductor:
VIN := 7.2 V
fsw := 100 kHz
Iripple := 5%*2 A = 100 mA
L := (VIN - VOUT)*VOUT/(fsw*Iripple*VIN) = 153.329 μH
# Output capacitor:
C_out := 200 μF
# Input capacitor:
C_in := 10 μF
# Bootstrap:
Cboot := 50 nF
# Catch diode:
Iload := 2 A
I_D.avg := Iload*1 = 2 A
